OpenVSP model (file version 4), 11 components.
Geometry view with OpenVSP parameter names; values to 6 digits, angles in degrees, lengths in the model's unit.
Overall bounding box: X_Min=-0.0437518 X_Len=10.9917 Y_Min=-9.08937 Y_Len=18.1787 Z_Min=-0.86665 Z_Len=3.13707

Fuselage "observable"
  location (X Y Z) 0 0 0.108696, rotation 0 0 0
  bounding box size 2.77795 1 1.2192
  Design: Length=2.7342
  cross sections:
    n  XLocPercent  YLocPercent  ZLocPercent  shape
    0  0            0            -0.0434783   point
    1  0.290288     0            0            ellipse Ellipse_Height=1.2192 Ellipse_Width=1
    2  0.512649     0            0            ellipse Ellipse_Height=1.219 Ellipse_Width=1
    3  0.75         0            0            as above
    4  1            0            0            point

Fuselage "gear", child of "observable"
  location (X Y Z) 1.19565 0 -0.434783, rotation 0 0 0
  bounding box size 0.617195 0.5 0.2
  Design: Length=0.603939
  cross sections:
    n  XLocPercent  YLocPercent  ZLocPercent  shape
    0  0            0            0            point
    1  0.290288     0            0            ellipse Ellipse_Height=0.2 Ellipse_Width=0.5
    2  0.75         0            0            as above
    3  1            0            0            point

StrutGear "StrutGear", child of "gear"
  location (X Y Z) 1.51786 -0.104167 -0.386905, rotation 0 90 0
  bounding box size 0.3 0.20833 0.479746
  Design: PresetTrigger=0 StrutDiameter=0.05 StrutLength=0.354746 TireDiameter=0.3 TireSelect=0 TireThickness=0.1 UnitMult=1 Units=0 WheelDiameter=0.2 WhlFlag=0
  custom script StrutGear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

Wing "pylon"
  location (X Y Z) 1.09244 0 0.913866, rotation -90 0 0
  bounding box size 1 0.11609 0.238988
  totals: TotalSpan=0.238988 TotalProjectedSpan=0.238988 TotalChord=1 TotalArea=0.238988
  root: chord 1, twist 0, NACA 4-series Camber=0 CamberLoc=0.2 ThickChord=0.0903226
  sections:
    n  Span      Root_Chord  Tip_Chord  Area      Sweep  Sweep_Location  Dihedral  Twist  Twist_Location  tip airfoil
    1  0.238988  1           1          0.238988  0      0               0         0      0.25            NACA 4-series Camber=0 CamberLoc=0.2 ThickChord=0.1

Fuselage "main_carry_through"
  location (X Y Z) 0.869565 0 0.978261, rotation 0 0 0
  bounding box size 10.0103 1 0.4
  Design: Length=10
  cross sections:
    n  XLocPercent  YLocPercent  ZLocPercent  shape
    0  0            0            0            point
    1  0.0215324    0            0            circle Circle_Diameter=0.2
    2  0.146739     0            0            as above
    3  0.5          0            0            ellipse Ellipse_Height=0.4 Ellipse_Width=1
    4  0.752717     0            0            circle Circle_Diameter=0.2
    5  0.946243     0            0            as above
    6  1            0            0            circle Circle_Diameter=0

Wing "engine_pylon"
  location (X Y Z) 6.55462 0 1.37605, rotation -90 0 -1.93277
  bounding box size 0.70972 0.0812627 0.323438
  totals: TotalSpan=0.3 TotalProjectedSpan=0.3 TotalChord=0.7 TotalArea=0.21
  root: chord 0.7, twist 0, NACA 4-series Camber=0 CamberLoc=0.2 ThickChord=0.0903226
  sections:
    n  Span  Root_Chord  Tip_Chord  Area  Sweep  Sweep_Location  Dihedral  Twist  Twist_Location  tip airfoil
    1  0.3   0.7         0.7        0.21  0      0               0         0      0.25            NACA 4-series Camber=0 CamberLoc=0.2 ThickChord=0.1

Stack "engine_geom"
  location (X Y Z) 6.3587 0 1.63043, rotation 0 0 0
  bounding box size 1 0.528409 0.528409
  cross sections:
    n  XDelta  YDelta  ZDelta  shape
    0  0       0       0       circle Circle_Diameter=0.528409
    1  1       0       0       circle Circle_Diameter=0.466736

Wing "main_wing"
  location (X Y Z) 5.12605 0.420168 0.976891, rotation 0 0 0
  symmetric about XZ
  bounding box size 1.5 18.1787 0.599446
  totals: TotalSpan=17.3622 TotalProjectedSpan=17.3384 TotalChord=1.25 TotalArea=21.7028
  root: chord 1.5, twist 0, NACA 4-series Camber=0 CamberLoc=0.2 ThickChord=0.1
  sections:
    n  Span    Root_Chord  Tip_Chord  Area     Sweep    Sweep_Location  Dihedral  Twist  Twist_Location  tip airfoil
    1  8.6811  1.5         1          10.8514  1.48387  0               3         0      0.25            as above

Wing "v-tail"
  location (X Y Z) 9.7479 0 0.976891, rotation 0 0 0
  symmetric about XZ
  bounding box size 1.2 4.33013 1.36319
  totals: TotalSpan=5 TotalProjectedSpan=4.33013 TotalChord=0.975 TotalArea=4.875
  root: chord 1.2, twist 0, NACA 4-series Camber=0 CamberLoc=0.2 ThickChord=0.1
  sections:
    n  Span  Root_Chord  Tip_Chord  Area    Sweep    Sweep_Location  Dihedral  Twist  Twist_Location  tip airfoil
    1  2.5   1.2         0.75       2.4375  4.64516  0               30        0      0.25            as above

Pod "landing_pods"
  location (X Y Z) 3.33333 3.57143 0.952381, rotation 0 0 0
  symmetric about XZ
  bounding box size 2.87778 7.63619 0.493333
  Design: FineRatio=11.6667 Length=2.87778

StrutGear "StrutGear", child of "landing_pods"
  location (X Y Z) 5.74405 3.49702 0.952382, rotation -180 0 -180; relative location 2.41071 -0.0744048 0, rotation 0 180 0
  symmetric about XZ
  bounding box size 1.99493 7.43071 0.35
  Design: PresetTrigger=0 StrutDiameter=0.12 StrutLength=1.87993 TireDiameter=0.35 TireSelect=0 TireThickness=0.1 UnitMult=1 Units=0 WheelDiameter=0.2 WhlFlag=0
  custom script StrutGear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
