OpenVSP model (file version 4), 2 components.
Geometry view with OpenVSP parameter names; values to 6 digits, angles in degrees, lengths in the model's unit.
Overall bounding box: X_Min=0 X_Len=1.46817 Y_Min=-0.353333 Y_Len=0.706667 Z_Min=-0.193333 Z_Len=0.386667

Stack "DJI_Inspire"
  location (X Y Z) 0 0 0, rotation 0 0 0
  bounding box size 0.47 0.706667 0.386667
  cross sections:
    n  XDelta  YDelta  ZDelta  shape
    0  0       0       0       point
    1  0       0       0       rounded rectangle RoundRectXSec_Radius=0 RoundedRect_Height=0.21 RoundedRect_Width=0.53
    2  0.47    0       0       as above
    3  0       0       0       point

Stack "StackGeom"
  location (X Y Z) 0.652174 0 0, rotation 0 0 0
  bounding box size 0.816 0.178066 0.178066
  cross sections:
    n  XDelta  YDelta  ZDelta  shape
    0  0       0       0       point
    1  0       0       0       circle Circle_Diameter=0.121
    2  0.316   0       0       as above
    3  0       0       0       as above
    4  0.5     0       0       point
