OpenVSP model (file version 4), 7 components.
Geometry view with OpenVSP parameter names; values to 6 digits, angles in degrees, lengths in the model's unit.
Overall bounding box: X_Min=-0.339674 X_Len=1.76332 Y_Min=-1.34816 Y_Len=2.69631 Z_Min=-0.225 Z_Len=0.667448

Wing "wing"
  location (X Y Z) 0 0.252101 0, rotation 0 0 0
  symmetric about XZ
  bounding box size 1.42364 2.69631 0.0983746
  totals: TotalSpan=2.19211 TotalProjectedSpan=2.19211 TotalChord=0.529627 TotalArea=1.161
  root: chord 0.847403, twist 0, NACA 4-series Camber=0 CamberLoc=0.2 ThickChord=0.1
  sections:
    n  Span     Root_Chord  Tip_Chord  Area    Sweep   Sweep_Location  Dihedral  Twist  Twist_Location  tip airfoil
    1  1.09606  0.847403    0.211851   0.5805  47.871  0               0         0      0.25            as above

Stack "DJI_INSPIRE_2"
  location (X Y Z) 0.0407609 0 0, rotation 0 0 0
  bounding box size 0.47 0.48 0.32
  cross sections:
    n  XDelta  YDelta  ZDelta  shape
    0  0       0       0       point
    1  0       0       0       rounded rectangle RoundRectXSec_Radius=0 RoundedRect_Height=0.32 RoundedRect_Width=0.48
    2  0.47    0       0       as above
    3  0       0       0       point

Stack "TJ20"
  location (X Y Z) 0.869565 0 0.326087, rotation 0 0 0
  bounding box size 0.316 0.232723 0.232723
  cross sections:
    n  XDelta  YDelta  ZDelta  shape
    0  0       0       0       circle Circle_Diameter=0.121
    1  0.316   0       0       circle Circle_Diameter=0.12

Stack "Fueltank"
  location (X Y Z) 0.543478 0 0, rotation 0 0 0
  bounding box size 0.188 0.3 0.2
  cross sections:
    n  XDelta  YDelta  ZDelta  shape
    0  0       0       0       point
    1  0       0       0       rounded rectangle RoundRectXSec_Radius=0 RoundedRect_Height=0.2 RoundedRect_Width=0.3
    2  0.188   0       0       as above
    3  0       0       0       point

Fuselage "floatsgeom"
  location (X Y Z) 0.230978 0.652174 -0.0815217, rotation 0 0 0
  symmetric about XZ
  bounding box size 0.872273 1.50435 0.102667
  Design: Length=0.872273
  cross sections:
    n  XLocPercent  YLocPercent  ZLocPercent  shape
    0  0            0            0            point
    1  0.25         0            0            general fuselage BotStr=0.83 BotTanAngle=90 CornerRad=0 Height=0.1 LowStr=0.83 MaxWidthLoc=0.5 TopStr=0.83 TopTanAngle=90 UpStr=0.83 Width=0.2
    2  0.5          0            0            general fuselage BotStr=0.83 BotTanAngle=90 CornerRad=0 Height=0.1 LowStr=0.83 MaxWidthLoc=0.4 TopStr=0.83 TopTanAngle=90 UpStr=0.83 Width=0.2
    3  0.75         0            0            general fuselage BotStr=0.83 BotTanAngle=90 CornerRad=0 Height=0.1 LowStr=0.83 MaxWidthLoc=0.35 TopStr=0.83 TopTanAngle=90 UpStr=0.83 Width=0.2
    4  1            0            0            point

Fuselage "Fuselage"
  location (X Y Z) -0.339674 0 0, rotation 0 0 0
  bounding box size 1.54227 0.7 0.45
  Design: Length=1.54227
  cross sections:
    n  XLocPercent  YLocPercent  ZLocPercent  shape
    0  0            0            0            point
    1  0.25         0            0            ellipse Ellipse_Height=0.45 Ellipse_Width=0.7
    2  0.574315     0            0            as above
    3  0.747283     0            0            ellipse Ellipse_Height=0.38 Ellipse_Width=0.7
    4  1            0            0            point

Pod "PodGeom"
  location (X Y Z) 0.714286 0 0.14881, rotation 0 -22.8571 0
  bounding box size 0.307159 0.0526316 0.146842
  Design: FineRatio=12.6667 Length=0.333333
